** ***************************************************************************
**   Written by : FEMAP
**   Version    : 6.00
**   From Model : E:\VIOGEM\JPR\PR_kr53.MOD
**   Date       : Tue Aug 24 18:10:05 1999
** ***************************************************************************
**
*NODE, NSET=GLOBAL
       1,        696.,       1682.,        425.
       2,   691.76708,   1691.6667,        425.
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*ELEMENT, TYPE=C3D8, ELSET=P1
      1,     15,     16,     23,     22,      1,      2,      9,      8
      2,     16,     17,     24,     23,      2,      3,     10,      9
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*ELSET, ELSET=OUT_CONT, GENERATE
1,1440,1
** FEMAP Property 1 : Untitled
*ORIENTATION, NAME=S0, DEFINITION=COORDINATES, SYSTEM=RECTANGULAR
        1.,        0.,        0.,        0.,        1.,        0.
*SOLID SECTION, ELSET=P1, MATERIAL=M1, ORIENTATION=S0
** FEMAP Material 1 : AISI 4340 Steel
*MATERIAL, NAME=M1
*ELASTIC, TYPE=ISOTROPIC
 29000000.,      0.32,       70.
*EXPANSION, TYPE=ISO
    6.6E-6,       70.
*DENSITY
0.00073315
*SPECIFIC HEAT
     38.64,       70.
*CONDUCTIVITY, TYPE=ISO
0.00048611,       70.
** Load Step 1 -------------------------------------------------------
*STEP, INC=100
Untitled
*STATIC

*NODE PRINT
   CF
   RF
    U
*EL PRINT, ELSET=OUT_CONT, POSITION=CENTROIDAL
    S
 SINV
*EL PRINT, ELSET=OUT_CONT,POSITION=NODES
    S
 SINV
*FILE FORMAT, ASCII
*NODE FILE
   CF
   RF
    U
*EL FILE, ELSET=OUT_CONT, POSITION=CENTROIDAL
    S
 SINV
*EL FILE, ELSET=OUT_CONT,POSITION=NODES
    S
 SINV
*BOUNDARY, OP=NEW
  150,    1
  150,    2
  150,    3
  150,    4
  150,    5
  150,    6
*ELSET, GENERATE, ELSET=E_ALL
    1 1440
*DLOAD, OP=NEW
E_ALL, GRAV,       10.,        0.,        1.,        0.
*END STEP
